rgbToGrayscale(rgb) :=
    r ← rows(rgb)
    c ← cols(rgb)/3
    for i ∈ 0 .. r - 1
        for j ∈ 0 .. c - 1
            tmp ← 0.2126*rgb[i, j] + 0.7152*rgb[i, j + c] + 0.0722*rgb[i, j + 2*c]
            tmp ← round(tmp)
            res[i, j] ← tmp
    res
createGaussKernel(diff, σ) :=
    sum ← 0
    for i ∈ -diff .. diff
        for j ∈ -diff .. diff
            val ← 1/(2*π*σ^2)*e^(-(i^2 + j^2)/(2*σ^2))
            sum ← sum + val
            res[i + diff, j + diff] ← val
    for i ∈ -diff .. diff
        for j ∈ -diff .. diff
            res[i + diff, j + diff] ← res[i + diff, j + diff]/sum
    res
getPixel(matr, rows, cols, r, c) :=
    r ← 0 if r < 0
    r ← rows - 1 if r ≥ rows
    c ← 0 if c < 0
    c ← cols - 1 if c ≥ cols
    matr[r, c]
isCorrectIndex(rows, cols, r, c) :=
    return 0 if (r < 0) or (c < 0)
    return 0 if (r ≥ rows) or (c ≥ cols)
    1
smoothImage(image, diff, σ) :=
    gaussKernel ← createGaussKernel(diff, σ)
    r ← rows(image)
    c ← cols(image)
    for i ∈ 0 .. r - 1
        for j ∈ 0 .. c - 1
            sum ← 0
            for k ∈ -diff .. diff
                for t ∈ -diff .. diff
                    sum ← sum + gaussKernel[k + diff, t + diff]*getPixel(image, r, c, i + k, j + t)
            res[i, j] ← round(sum)
    res
sobelKernelX := [-1, 0, 1; -2, 0, 2; -1, 0, 1]
sobelKernelY := [-1, -2, -1; 0, 0, 0; 1, 2, 1]
matrToImage(matr) :=
    r ← rows(matr)
    c ← cols(matr)
    for i ∈ 0 .. r - 1
        for j ∈ 0 .. c - 1
            pixel ← round(matr[i, j])
            pixel ← 0 if pixel < 0
            pixel ← 255 if pixel > 255
            res[i, j] ← pixel
    res
searchGradient(image, sobelKernelX, sobelKernelY) :=
    r ← rows(image)
    c ← cols(image)
    angleIntervals ← transpose([π/8, 3*π/8, 5*π/8, 7*π/8])
    for i ∈ 0 .. r - 1
        for j ∈ 0 .. c - 1
            gx ← 0
            gy ← 0
            for k ∈ -1 .. 1
                for t ∈ -1 .. 1
                    pixel ← getPixel(image, r, c, i + k, j + t)
                    gx ← gx + sobelKernelX[k + 1, t + 1]*pixel
                    gy ← gy + sobelKernelY[k + 1, t + 1]*pixel
            grad[i, j] ← sqrt(gx^2 + gy^2)
            angle ← 0
            angle ← atan2(gx, gy) if (gx ≠ 0) or (gy ≠ 0)
            angle ← angle + π if angle < 0
            dir ← 0
            for t ∈ 0 .. 3
                if angle ≤ angleIntervals[t]
                    dir ← t
                    break
            angleApprox[i, j] ← dir
    [grad; angleApprox]
nonMaxSuppression(grad, angleApprox) :=
    r ← rows(grad)
    c ← cols(grad)
    colDiffPrev ← transpose([-1, -1, 0, 1])
    colDiffNext ← transpose([1, 1, 0, -1])
    rowDiffPrev ← transpose([0, -1, -1, -1])
    rowDiffNext ← transpose([0, 1, 1, 1])
    for i ∈ 0 .. r - 1
        for j ∈ 0 .. c - 1
            g ← grad[i, j]
            dir ← angleApprox[i, j]
            prevG ← getPixel(grad, r, c, i + rowDiffPrev[dir], j + colDiffPrev[dir])
            nextG ← getPixel(grad, r, c, i + rowDiffNext[dir], j + colDiffNext[dir])
            grad[i, j] ← 0 if (g < prevG) or (g < nextG)
            otherwise
                grad[i, j] ← 0 if g == prevG
    grad
doubleFilter(grad, firstGrad, secondGrad) :=
    return "error" if firstGrad ≥ secondGrad
    r ← rows(grad)
    c ← cols(grad)
    for i ∈ 0 .. r - 1
        for j ∈ 0 .. c - 1
            res[i, j] ← 0 if grad[i, j] ≤ firstGrad
            otherwise
                res[i, j] ← 127 if grad[i, j] ≤ secondGrad
                res[i, j] ← 255 otherwise
    res
edgeTracking(filteredGrad) :=
    r ← rows(filteredGrad)
    c ← cols(filteredGrad)
    for i ∈ 0 .. r - 1
        for j ∈ 0 .. c - 1
            if filteredGrad[i, j] == 127
                flagSave ← 0
                buff[0, 0] ← i
                buff[0, 1] ← j
                buffMain ← buff
                filteredGrad[i, j] ← 0
                buffRows ← rows(buff)
                while buffRows > 0
                    buffNext ← 0
                    buffNextRows ← 0
                    for ind ∈ 0 .. buffRows - 1
                        buff_i ← buff[ind, 0]
                        buff_j ← buff[ind, 1]
                        for k ∈ buff_i - 1 .. buff_i + 1
                            for t ∈ buff_j - 1 .. buff_j + 1
                                if isCorrectIndex(r, c, k, t)
                                    if filteredGrad[k, t] == 127
                                        buffNext[buffNextRows, 0] ← k
                                        buffNext[buffNextRows, 1] ← t
                                        buffNextRows ← buffNextRows + 1
                                        filteredGrad[k, t] ← 0
                                    otherwise
                                        flagSave ← 1 if filteredGrad[k, t] == 255
                    buff ← buffNext
                    buffRows ← rows(buff)
                    buffMain ← stack(buffMain, buff) if buffRows > 0
                if flagSave
                    size ← rows(buffMain)
                    for ind ∈ 0 .. size - 1
                        k ← buffMain[ind, 0]
                        t ← buffMain[ind, 1]
                        filteredGrad[k, t] ← 255
    filteredGrad
fileName := "img_01.jpg"
σ := 1.4
diff := 2
firstGrad := 45
secondGrad := 60
rgb := READRGB(fileName)
image := rgbToGrayscale(rgb)
smoothedImage := smoothImage(image, diff, σ)
gradUnit := searchGradient(smoothedImage, sobelKernelX, sobelKernelY)
grad := gradUnit[0]
angleApprox := gradUnit[1]
supprGrad := nonMaxSuppression(grad, angleApprox)
filteredGrad := doubleFilter(supprGrad, firstGrad, secondGrad)
edge := edgeTracking(filteredGrad)
# [component: inputs rgb]
# [component: inputs image]
# [component: inputs smoothedImage]
# [component: inputs matrToImage(grad)]
# [component: inputs matrToImage(supprGrad)]
# [component: inputs filteredGrad]
# [component: inputs edge]
